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Ic := 2 mA
Uce := 3 V
β := 300
Ucc := 5 V
Ube := 0.7 V
Ib := β == Ic/Ib solve, Ib → mA/150 = 6.66667 μA
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Rc := (Ucc - Uce)/Ic = 1 kΩ
Rb := (Ucc - Ube)/Ib = 645 kΩ
# Målinger
U_CE := 1.397 V
U_BE := 3.085 V
Ic := U_CE/Rc = 1.397 mA
Ib := U_BE/Rb = 4.78295 μA
β := Ic/Ib = 292.079
