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Ic := 0.3 mA
U0 := 2.5 V
A := 6
Ube := 0.7 V
Ucc := 5 V
β := 292
Uce := 2.5 V
Rc := (Ucc - Uce)/Ic = 8.33333 kΩ
Rb := β*(Uce - Ube)/Ic = 1.752 MΩ
Ra := Rb/A/(1 + Rb/(β*Rc)) = 169.767 kΩ
Udc := (Rb/(β*Rc)*Ucc + (1*Rb/Ra)*Ube)/(1 + Rb/(β*Rc)) = 6.29302 V
Uce == Udc - A*Ui solve, Ui, float, 3 → 1.05*V - 0.417*V = 0.633 V
U0(Ui) := Udc - A*Ui
Ui := 0.01 V, 0.02 V .. 1 V
Simx := [0.1; 0.2; 0.3; 0.4; 0.5; 0.6; 0.7; 0.8; 0.9; 1.0]*V
Simy := [4.82; 4.56; 4.21; 3.79; 3.33; 2.84; 2.35; 1.84; 1.33; 0.82]*V
Målx := [0.1; 0.2; 0.3; 0.4; 0.5; 0.6; 0.7; 0.8; 0.9; 1.0]*V
Måly := [4.937; 4.768; 4.450; 3.894; 3.419; 2.743; 2.069; 1.556; 1.013; 0.156]*V
# [plot: U0(Ui) (V), Simy (V), Måly (V) vs Ui (V), Simx (V), Målx (V)]
# [plot: 3.04, 3.09, 3.13, 3.17, 3.22, 3.26 vs 0.4, 0.5, 0.6, 0.7, 0.8, 0.9]
[Ui; U0] := [0.4, 0.5, 0.6, 0.7, 0.8, 0.9; 3.04, 3.09, 3.13, 3.17, 3.22, 3.26]
I_s := 2 mA  # I_d
I_d := 2 mA
U_gs := 2 V
R_e := U_gs/I_d = 1 kΩ
