Id := 2 mA
Idss := 9.5 mA
Up := -4 V
Id == (1 - Ugs/Up)^2*Idss solve, Ugs, float, 3 → [16.0*(0.0132*V^2)^(1/2.0) - 4.0*V; -16.0*(0.0132*V^2)^(1/2.0) - 4.0*V] = [-2.16174; -5.83826] V
Ugs := -2.162 V
R := Ugs/Id = -1081 Ω
